OpenVSP model (file version 5), 6 components.
Geometry view with OpenVSP parameter names; values to 6 digits, angles in degrees, lengths in the model's unit.
Overall bounding box: X_Min=-0.158063 X_Len=27.3581 Y_Min=-18 Y_Len=36 Z_Min=-3.125 Z_Len=6.25

Hinge "HingeGeom"
  location (X Y Z) 0 0 0, rotation 0 0 0
  Hinge: JointRotMax=360 JointRotMaxFlag=0 JointRotMin=-360 JointRotMinFlag=0 JointRotate=0 JointRotateFlag=1 JointTransMax=1000 JointTransMaxFlag=0 JointTransMin=-1000 JointTransMinFlag=0 JointTranslate=0 JointTranslateFlag=0 OrientRotFlag=0 PrimOffAbsRelFlag=1 PrimType=0 PrimULoc=0 PrimVecAbsRelFlag=1 PrimWLoc=0 PrimXOff=0 PrimXOffRel=0 PrimXVec=1 PrimXVecRel=1 PrimYOff=0 PrimYOffRel=0 PrimYVec=0 PrimYVecRel=0 PrimZOff=0 PrimZOffRel=0 PrimZVec=0 PrimZVecRel=0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

Wing "Wing"
  location (X Y Z) 6.91304 0 2, rotation 0 0 0
  symmetric about XZ
  bounding box size 5.53779 36 0.775593
  totals: TotalSpan=36 TotalProjectedSpan=36 TotalChord=4.84 TotalArea=174.24 TotalAR=7.43802
  root: chord 5.53143, twist 0, NACA 4-series Camber=0.044 CamberLoc=0.212727 ThickChord=0.118182
  sections:
    n  Span  Root_Chord  Tip_Chord  Area   Sweep  Sweep_Location  Dihedral  Twist  Twist_Location  tip airfoil
    1  18    5.53143     4.14857    87.12  2      0               0         0      0.25            NACA 4-series Camber=0 CamberLoc=0.2 ThickChord=0.1

Fuselage "Fuselage"
  location (X Y Z) 0 0 0, rotation 0 0 0
  bounding box size 27.2 3.2 4
  Design: Length=27.2
  cross sections:
    n  XLocPercent  YLocPercent  ZLocPercent  shape
    0  0            0            0            general fuselage BotStr=0.83 BotTanAngle=90 CornerRad=0 Height=0 LowStr=0.83 MaxWidthLoc=0 TopStr=0.83 TopTanAngle=90 UpStr=0.83 Width=0
    1  0.116848     0            0            general fuselage BotStr=0.83 BotTanAngle=90 CornerRad=0 Height=4 LowStr=0.83 MaxWidthLoc=0 TopStr=0.83 TopTanAngle=90 UpStr=0.83 Width=3.2
    2  0.5          0            0            as above
    3  0.75         0            0            general fuselage BotStr=0.83 BotTanAngle=90 CornerRad=0 Height=2.52973 LowStr=0.83 MaxWidthLoc=0 TopStr=0.83 TopTanAngle=90 UpStr=0.83 Width=1.55405
    4  1            0            0            point

Wing "Tail", child of "Fuselage"
  location (X Y Z) 24 0 0, rotation 0 0 0
  symmetric about XZ
  bounding box size 2.29865 11.2 0.229998
  totals: TotalSpan=11.2 TotalProjectedSpan=11.2 TotalChord=2.01132 TotalArea=22.5267 TotalAR=5.56849
  root: chord 2.29865, twist 0, NACA 4-series Camber=0 CamberLoc=0.2 ThickChord=0.1
  sections:
    n  Span  Root_Chord  Tip_Chord  Area     Sweep  Sweep_Location  Dihedral  Twist  Twist_Location  tip airfoil
    1  5.6   2.29865     1.72399    11.2634  5      0               0         0      0.25            as above

Propeller "PropGeom"
  location (X Y Z) 0 0 0, rotation 0 0 0
  bounding box size 0.310606 6.26126 0.605719
  Design: Diameter=6.25 NumBlade=2 Beta34=20 UseBeta34Flag=1 Feather=0 Rotate=0 Precone=0 ReverseFlag=0 FoldAngle=0 PropMode=0 AF=151.538 CLi=0.538798 Chord=0.177656 Solidity=0.113099 ConstructXoC=0.5 FeatherAxisXoC=0.5 FeatherOffsetXoC=0
  cross sections:
    n  RadiusFrac  shape
    0  0.2         ellipse Ellipse_Height=0.125 Ellipse_Width=0.25
    1  0.4         NACA 16-series Chord=0.519531 IdealCl=0.7 ThickChord=0.144074
    2  1           NACA 16-series Chord=0.40625 IdealCl=0.2 ThickChord=0.03
  Chord along r/R (cubic Bezier): 0.2: 0.08, 0.333333: 0.15, 0.466667: 0.2, 0.6: 0.2, 0.716667: 0.2, 0.833333: 0.2, 0.95: 0.2, 0.966667: 0.2, 0.983333: 0.2, 1: 0.13
  Twist along r/R (PCHIP): 0.2: 46.75, 0.75: 20, 1: 13
  Thick along r/R (cubic Bezier): 0.2: 0.5, 0.233333: 0.3, 0.266667: 0.225, 0.3: 0.2, 0.4: 0.125, 0.5: 0.115, 0.6: 0.1, 0.733333: 0.075, 0.866667: 0.055, 1: 0.03
  CLI along r/R (cubic Bezier): 0.2: 0, 0.266667: 0.7, 0.333333: 0.7, 0.4: 0.7, 0.466667: 0.7, 0.533333: 0.7, 0.6: 0.7, 0.733333: 0.7, 0.866667: 0.7, 1: 0.2

Custom "Disk", child of "PropGeom"
  location (X Y Z) 0 0 0, rotation 0 0 0
  bounding box size 0 6.25 6.25
  Design: Diameter=6.25
  custom script Disk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
